// SBML level 2 version 1

model main()

  // Compartments:
  compartment rootCompartment = 1;

  // Species:
  substanceOnly species IGF in rootCompartment = 0;
  substanceOnly species IR in rootCompartment = 150;
  substanceOnly species IRL in rootCompartment = 0;
  substanceOnly species IRp in rootCompartment = 0;
  substanceOnly species IRi in rootCompartment = 0;
  substanceOnly species PI3Ka in rootCompartment = 200;
  substanceOnly species PI3Kb in rootCompartment = 200;
  substanceOnly species IRp_PI3Ka in rootCompartment = 0;
  substanceOnly species IRp_PI3Kb in rootCompartment = 0;
  substanceOnly species pHER3L_PI3Ka in rootCompartment = 0;
  substanceOnly species pHER3L_PI3Kb in rootCompartment = 0;
  substanceOnly species PIP3 in rootCompartment = 0;
  substanceOnly species PIP2 in rootCompartment = 3000;
  substanceOnly species PDK1 in rootCompartment = 100;
  substanceOnly species mPDK1 in rootCompartment = 0;
  substanceOnly species GAB in rootCompartment = 225;
  substanceOnly species mGABp in rootCompartment = 0;
  substanceOnly species PREX1 in rootCompartment = 100;
  substanceOnly species mPREX1 in rootCompartment = 0;
  substanceOnly species dRac1 in rootCompartment = 100;
  substanceOnly species tRac1 in rootCompartment = 0;
  substanceOnly species Akt in rootCompartment = 100;
  substanceOnly species pAkt in rootCompartment = 0;
  substanceOnly species SGK1 in rootCompartment = 100;
  substanceOnly species pSGK1 in rootCompartment = 0;
  substanceOnly species SGK3 in rootCompartment = 100;
  substanceOnly species pSGK3 in rootCompartment = 0;
  substanceOnly species GSK3 in rootCompartment = 100;
  substanceOnly species pGSK3 in rootCompartment = 0;
  substanceOnly species mTORC1 in rootCompartment = 100;
  substanceOnly species amTORC1 in rootCompartment = 0;
  substanceOnly species FOXO3 in rootCompartment = 100;
  substanceOnly species pFOXO3 in rootCompartment = 0;
  substanceOnly species NDRG1 in rootCompartment = 100;
  substanceOnly species pNDRG1 in rootCompartment = 0;
  substanceOnly species S6K in rootCompartment = 100;
  substanceOnly species pS6K in rootCompartment = 0;
  substanceOnly species S6 in rootCompartment = 100;
  substanceOnly species pS6 in rootCompartment = 0;
  substanceOnly species dRas in rootCompartment = 150;
  substanceOnly species tRas in rootCompartment = 0;
  substanceOnly species Raf in rootCompartment = 100;
  substanceOnly species aaRaf in rootCompartment = 0;
  substanceOnly species Mek in rootCompartment = 200;
  substanceOnly species pMek in rootCompartment = 0;
  substanceOnly species Erk in rootCompartment = 400;
  substanceOnly species pErk in rootCompartment = 0;
  substanceOnly species HER3 in rootCompartment = 100;
  substanceOnly species HRG in rootCompartment = 0;
  substanceOnly species HER3L in rootCompartment = 0;
  substanceOnly species pHER3L in rootCompartment = 0;
  substanceOnly species iHER3L in rootCompartment = 0;
  substanceOnly species ER in rootCompartment = 10;
  substanceOnly species pER in rootCompartment = 0;
  substanceOnly species RB in rootCompartment = 100;
  substanceOnly species pRB in rootCompartment = 0;
  substanceOnly species ppRB in rootCompartment = 0;
  substanceOnly species E2F in rootCompartment = 0;
  substanceOnly species E2FRB in rootCompartment = 0;
  substanceOnly species Cd in rootCompartment = 0;
  substanceOnly species CDK4 in rootCompartment = 100;
  substanceOnly species K4D in rootCompartment = 0;
  substanceOnly species K4Da in rootCompartment = 0;
  substanceOnly species Ce in rootCompartment = 0;
  substanceOnly species CDK2 in rootCompartment = 100;
  substanceOnly species K2E in rootCompartment = 0;
  substanceOnly species K2Ea in rootCompartment = 0;
  substanceOnly species p21 in rootCompartment = 0;
  substanceOnly species K4Da_p21 in rootCompartment = 0;
  substanceOnly species K2Ea_p21 in rootCompartment = 0;
  substanceOnly species cMyc in rootCompartment = 0;
  substanceOnly species p_p21 in rootCompartment = 0;

  // Parameters:
  ka_rt_001 = 0.0831764;
  kd_rt_001 = 0.0141254;
  kc1_rt_002 = 0.108393;
  vm_rt_002 = 26.9153;
  kc1_rt_003 = 23.4423;
  vm_rt_003 = 2.69153;
  kc2_rt_004 = 0.229087;
  vm_rt_004 = 2.75423;
  Ki_rt_004 = 0.00331131;
  kc2_rt_005 = 0.00645654;
  vm_rt_005 = 0.724436;
  kc2_rt_006 = 316.228;
  vm_rt_006 = 0.0128825;
  kc2_rt_007 = 28.1838;
  vm_rt_007 = 0.0295121;
  alpha_rt_008a = 0.0162181;
  alpha_rt_008b = 316.228;
  alpha_rt_008c = 0.11749;
  kc2_rt_010 = 7.94328;
  Ki_rt_010 = 128.825;
  vm_rt_010 = 50.1187;
  kc2_rt_008 = 0.0707946;
  kc2_rt_009 = 288.403;
  Km_rt_008 = 2.81838;
  vm_rt_011 = 0.954993;
  kc2_rt_011 = 28.8403;
  kc2_rt_012 = 0.218776;
  vm_rt_012 = 0.616595;
  kc2_rt_013 = 1;
  vm_rt_013 = 64.5654;
  kc2_rt_014 = 0.436516;
  vm_rt_014 = 0.112202;
  ki_rt_014 = 281.838;
  kc2_rt_015 = 2.29087;
  vm_rt_015 = 100;
  kc2_rt_016 = 1.31826;
  vm_rt_016 = 0.128825;
  kc2_rt_016a = 316.228;
  vm_rt_016a = 2.04174;
  kc2_rt_017a = 0.111429;
  kc2_rt_017b = 13.1826;
  alpha_rt_017 = 0.00988553;
  vm_rt_017 = 147.911;
  kc2_rt_018a = 316.228;
  kc2_rt_018b = 316.228;
  vm_rt_018 = 0.00213796;
  kc2_rt_019 = 102.329;
  vm_rt_019 = 263.027;
  kc2_rt_020a = 1.02329;
  kc2_rt_020b = 154.882;
  vm_rt_020 = 316.228;
  kc2_rt_021a = 41.6869;
  kc2_rt_021b = 0.0416869;
  kc2_rt_021c = 316.228;
  vm_rt_021 = 0.01;
  Ki_rt_021 = 0.389045;
  Ki_rt_022 = 316.228;
  kc2_rt_022 = 0.00550808;
  Km_rt_022 = 316.228;
  kc2_rt_023 = 316.228;
  Km_rt_023 = 2.5704;
  vm_rt_023 = 316.228;
  alpha_rt_023 = 316.228;
  kc2_rt_024 = 316.228;
  vm_rt_024 = 194.984;
  vs_rt_025 = 2.95121;
  Km_rt_025 = 87.0964;
  kdeg_rt_026 = 3.63078;
  vs_rt_027 = 31.6228;
  kc2_rt_029 = 22.9087;
  vm_rt_029 = 316.228;
  kdeg_rt_030 = 0.17378;
  Km_rt_030 = 0.323594;
  Km_rt_031 = 218.776;
  vs_rt_031 = 184.077;
  deg_rt_031 = 0.0891251;
  alpha_rt_031 = 316.228;
  kd_rt_033 = 0.0851138;
  ka_rt_033 = 0.0537032;
  alpha_rt_034_a = 0.102329;
  kc1_rt_034_a = 10.617;
  vm_rt_034_a = 295.121;
  kc1_rt_034 = 0.316228;
  vm_rt_034 = 1.34896;
  Km_rt_035 = 12.8825;
  vs_rt_035b = 12.5893;
  deg_rt_035 = 208.93;
  vm_rt_037 = 0.00288403;
  kc2_rt_037 = 0.0186209;
  mtPIK3CA = 0.112202;
  vs_cc_001 = 10.7152;
  kc1_cc_003 = 0.0831764;
  vm_cc_003 = 0.00416869;
  kc2_cc_005 = 239.883;
  vm_cc_005 = 0.562341;
  tr_cc_007a = 0.0616595;
  Km_cc_007a = 13.1826;
  Km_cc_007b = 0.138038;
  tr_cc_007b = 316.228;
  tr_cc_007c = 0.0371535;
  kdeg_cc_008a = 173.78;
  kdeg_cc_008b = 79.4328;
  Km_cc_008 = 0.0177828;
  ka_cc_009 = 2.44343;
  kd_cc_009 = 0.245471;
  vs_cc_010c = 0.234423;
  kdeg_cc_011 = 0.0125893;
  Km_cc_011 = 0.0239883;
  kc2_cc_011 = 51.88;
  Km_cc_010b = 0.00288403;
  ka_cc_012 = 0.01;
  kd_cc_012 = 0.00954993;
  kc1_cc_013 = 0.0286418;
  kc2_cc_013a = 0.732825;
  vm_cc_013b = 237.137;
  ka_cc_014 = 0.691831;
  kc2_cc_014a = 0.0245471;
  kd_cc_014 = 0.301995;
  vs_cc_015 = 0.0269153;
  kdeg_cc_015 = 316.228;
  Km_cc_015 = 0.0245471;
  ka_cc_017 = 234.423;
  kd_cc_017 = 7.24436;
  kc1_cc_018a = 0.0218776;
  vm_cc_018b = 0.758578;
  ka_cc_019 = 2.5704;
  kd_cc_019 = 2.29087;
  vs_cc_020 = 1.51356;
  Km_cc_020 = 316.228;
  deg_cc_021 = 0.00724436;
  kc2_cc_021a = 81.2831;
  kc2_cc_021b = 316.228;
  Km_cc_021a = 0.213796;
  Km_cc_021b = 0.0588844;
  Km_cc_025a = 4.0738;
  Km_cc_025b = 0.0562341;
  vs_cc_025a = 0.398107;
  vs_cc_025b = 245.471;
  deg_cc_025 = 0.125893;
  kc1_cc_026 = 0.0552077;
  a0 = 1;
  b0 = 1;
  PTEN = 100;
  IGF_on_time = 2000;
  HRG_on_time = 2000;
  BYL719_on_time = 100000;
  BYL719 = 0;
  w_drg = 1;
  Ki_drg = 0.05;
  pi3kbi_on_time = 100000;
  pi3kbi = 0;
  igfri_on_time = 100000;
  igfri = 0;
  her3i_on_time = 100000;
  her3i = 0;
  pdk1i_on_time = 100000;
  pdk1i = 0;
  pprexi_on_time = 100000;
  pprexi = 0;
  rac1i_on_time = 100000;
  rac1i = 0;
  ndrg1i_on_time = 100000;
  ndrg1i = 0;
  sgk1i_on_time = 100000;
  sgk1i = 0;
  sgk3i_on_time = 100000;
  sgk3i = 0;
  akti_on_time = 100000;
  akti = 0;
  rasi_on_time = 100000;
  rasi = 0;
  rafi_on_time = 100000;
  rafi = 0;
  meki_on_time = 100000;
  meki = 0;
  erki_on_time = 100000;
  erki = 0;
  gsk3i_on_time = 100000;
  gsk3i = 0;
  mtorc1i_on_time = 100000;
  mtorc1i = 0;
  foxo3i_on_time = 100000;
  foxo3i = 0;
  myci_on_time = 100000;
  myci = 0;
  cdi_on_time = 100000;
  cdi = 0;
  cei_on_time = 100000;
  cei = 0;
  e2fi_on_time = 100000;
  e2fi = 0;
  p21i_on_time = 100000;
  p21i = 0;
  eri_on_time = 100000;
  eri = 0;
  s6ki_on_time = 100000;
  s6ki = 0;

  // Assignment rules:
  IGF_on := piecewise(1, time >= IGF_on_time, 0);
  HRG_on := piecewise(1, time >= HRG_on_time, 0);
  BYL719_on := piecewise(1, time >= BYL719_on_time, 0);
  pi3kbi_on := piecewise(1, time >= pi3kbi_on_time, 0);
  igfri_on := piecewise(1, time >= igfri_on_time, 0);
  her3i_on := piecewise(1, time >= her3i_on_time, 0);
  pdk1i_on := piecewise(1, time >= pdk1i_on_time, 0);
  pprexi_on := piecewise(1, time >= pprexi_on_time, 0);
  rac1i_on := piecewise(1, time >= rac1i_on_time, 0);
  ndrg1i_on := piecewise(1, time >= ndrg1i_on_time, 0);
  sgk1i_on := piecewise(1, time >= sgk1i_on_time, 0);
  sgk3i_on := piecewise(1, time >= sgk3i_on_time, 0);
  akti_on := piecewise(1, time >= akti_on_time, 0);
  rasi_on := piecewise(1, time >= rasi_on_time, 0);
  rafi_on := piecewise(1, time >= rafi_on_time, 0);
  meki_on := piecewise(1, time >= meki_on_time, 0);
  erki_on := piecewise(1, time >= erki_on_time, 0);
  gsk3i_on := piecewise(1, time >= gsk3i_on_time, 0);
  mtorc1i_on := piecewise(1, time >= mtorc1i_on_time, 0);
  foxo3i_on := piecewise(1, time >= foxo3i_on_time, 0);
  myci_on := piecewise(1, time >= myci_on_time, 0);
  cdi_on := piecewise(1, time >= cdi_on_time, 0);
  cei_on := piecewise(1, time >= cei_on_time, 0);
  e2fi_on := piecewise(1, time >= e2fi_on_time, 0);
  p21i_on := piecewise(1, time >= p21i_on_time, 0);
  eri_on := piecewise(1, time >= eri_on_time, 0);
  s6ki_on := piecewise(1, time >= s6ki_on_time, 0);
  phosphoAkt := pAkt;
  phosphoErk := pErk;
  phosphoHER3 := pHER3L;
  phosphoS6 := pS6;
  phosphoS6K := pS6K;
  // input of CC
  phosphoFOXO3 := pFOXO3;
  phosphoIGFR := IRp;
  phosphoRB := pRB + ppRB;
  phosphoSGK1 := pSGK1;
  phosphoSGK3 := pSGK3;
  phosphoGSK3 := pGSK3;
  phosphoNDRG1 := pNDRG1;
  phosphomGAB := mGABp;
  actmTORC1 := amTORC1;
  phosphoER := pER;
  activeCd := K4Da + K4Da_p21;
  activeE2F := E2F;
  totalSGK3 := SGK3 + pSGK3;
  totalAkt := Akt + pAkt;
  totalErk := Erk + pErk;
  totalHER3 := HER3 + HER3L + pHER3L + iHER3L + pHER3L_PI3Ka + pHER3L_PI3Kb;
  totalS6 := S6 + pS6;
  totalS6K := S6K + pS6K;
  totalCd := Cd + K4D + K4Da + K4Da_p21;
  totalCe := Ce + K2E + K2Ea + K2Ea_p21;
  totalp21 := p21 + K4Da_p21 + K2Ea_p21 + p_p21;
  totalcMyc := cMyc;
  totalRB := RB + pRB + ppRB + E2FRB;
  totalE2F := E2F + E2FRB;
  totalER := ER + pER;
  totalCDK4 := CDK4 + K4D + K4Da + K4Da_p21;
  totalCDK2 := CDK2 + K2E + K2Ea + K2Ea_p21;
  totalIGFR := IR + IRL + IRp + IRi + IRp_PI3Ka + IRp_PI3Kb;
  totalPI3Ka := PI3Ka + IRp_PI3Ka + pHER3L_PI3Ka;
  totalPI3Kb := PI3Kb + IRp_PI3Kb + pHER3L_PI3Kb;
  totalPIP := PIP2 + PIP3;
  totalGAB := GAB + mGABp;
  totalPDK1 := PDK1 + mPDK1;
  totalPPREX1 := PREX1 + mPREX1;
  totalRac1 := dRac1 + tRac1;
  totalSGK1 := SGK1 + pSGK1;
  totalFOXO3 := FOXO3 + pFOXO3;
  totalRas := dRas + tRas;
  totalRaf := Raf + aaRaf;
  totalMEK := Mek + pMek;
  totalNDRG1 := NDRG1 + pNDRG1;

  // Reactions:
  rt_001: IGF + IR => IRL; ka_rt_001*IR*IGF*IGF_on - kd_rt_001*IRL;
  rt_002: IRL => IRp; kc1_rt_002*IRL*(1 - w_drg*igfri_on*igfri/(Ki_drg + igfri)) - vm_rt_002*IRp;
  rt_003: IRp => IRi; kc1_rt_003*IRp - vm_rt_003*IRi;
  rt_004: PI3Ka => IRp_PI3Ka; kc2_rt_004*IRp*PI3Ka/(1 + Ki_rt_004*pS6K*(1 - w_drg*s6ki_on*s6ki/(Ki_drg + s6ki))) - vm_rt_004*IRp_PI3Ka;  // modifiers: IRp, pS6K
  rt_005: PI3Kb => IRp_PI3Kb; kc2_rt_005*IRp*PI3Kb/(1 + Ki_rt_004*pS6K*(1 - w_drg*s6ki_on*s6ki/(Ki_drg + s6ki))) - vm_rt_005*IRp_PI3Kb;  // modifiers: IRp, pS6K
  rt_006: PI3Ka => pHER3L_PI3Ka; kc2_rt_006*pHER3L*PI3Ka - vm_rt_006*pHER3L_PI3Ka;  // modifiers: pHER3L
  rt_007: PI3Kb => pHER3L_PI3Kb; kc2_rt_007*pHER3L*PI3Kb - vm_rt_007*pHER3L_PI3Kb;  // modifiers: pHER3L
  rt_008: PIP2 => PIP3; PIP2*kc2_rt_008/(Km_rt_008 + PIP2)*((mtPIK3CA + (IRp_PI3Ka + pHER3L_PI3Ka)*(1 + alpha_rt_008a*mGABp + alpha_rt_008b*tRas*(1 - w_drg*rasi_on*rasi/(Ki_drg + rasi))))*(1 - w_drg*BYL719_on*BYL719/(Ki_drg + BYL719)) + (IRp_PI3Kb + pHER3L_PI3Kb)*(1 + alpha_rt_008a*mGABp + alpha_rt_008c*tRac1*(1 - w_drg*rac1i_on*rac1i/(Ki_drg + rac1i)))*(1 - w_drg*pi3kbi_on*pi3kbi/(Ki_drg + pi3kbi)));  // modifiers: IRp_PI3Ka, IRp_PI3Kb, mGABp, pHER3L_PI3Ka, pHER3L_PI3Kb, tRac1, tRas
  rt_009: PIP3 => PIP2; kc2_rt_009*PIP3*PTEN;
  rt_010: GAB => mGABp; kc2_rt_010*GAB*PIP3/(1 + Ki_rt_010*pErk*(1 - w_drg*erki_on*erki/(Ki_drg + erki))) - vm_rt_010*mGABp;  // modifiers: PIP3, pErk
  rt_011: PDK1 => mPDK1; kc2_rt_011*PDK1*PIP3 - vm_rt_011*mPDK1;  // modifiers: PIP3
  rt_012: PREX1 => mPREX1; kc2_rt_012*PREX1*PIP3 - vm_rt_012*mPREX1;  // modifiers: PIP3
  rt_013: dRac1 => tRac1; kc2_rt_013*mPREX1*dRac1*(1 - w_drg*pprexi_on*pprexi/(Ki_drg + pprexi)) - vm_rt_013*tRac1;  // modifiers: mPREX1
  rt_014: Akt => pAkt; kc2_rt_014*mPDK1*Akt*(1 - w_drg*pdk1i_on*pdk1i/(Ki_drg + pdk1i))/(1 + ki_rt_014*ppRB) - vm_rt_014*pAkt;  // modifiers: mPDK1, ppRB
  rt_015: SGK1 => pSGK1; kc2_rt_015*SGK1*mPDK1*(1 - w_drg*pdk1i_on*pdk1i/(Ki_drg + pdk1i))/(1 + ki_rt_014*ppRB) - vm_rt_015*pSGK1;  // modifiers: mPDK1, ppRB
  rt_016: SGK3 => pSGK3; kc2_rt_016*mPDK1*SGK3*(1 - w_drg*pdk1i_on*pdk1i/(Ki_drg + pdk1i))/(1 + ki_rt_014*ppRB) - vm_rt_016*pSGK3;  // modifiers: mPDK1, ppRB
  rt_016a: GSK3 => pGSK3; kc2_rt_016a*pAkt*GSK3*(1 - w_drg*akti_on*akti/(Ki_drg + akti)) - vm_rt_016a*pGSK3;  // modifiers: pAkt
  rt_017: mTORC1 => amTORC1; mTORC1*(kc2_rt_017a*pAkt*(1 - w_drg*akti_on*akti/(Ki_drg + akti)) + kc2_rt_017b*pSGK1*(1 - w_drg*sgk1i_on*sgk1i/(Ki_drg + sgk1i)))*(1 + alpha_rt_017*K4Da) - vm_rt_017*amTORC1;  // modifiers: K4Da, pAkt, pSGK1
  rt_018: FOXO3 => pFOXO3; FOXO3*(kc2_rt_018a*pAkt*(1 - w_drg*akti_on*akti/(Ki_drg + akti)) + kc2_rt_018b*pSGK1*(1 - w_drg*sgk1i_on*sgk1i/(Ki_drg + sgk1i))) - vm_rt_018*pFOXO3;  // modifiers: pAkt, pSGK1
  rt_019: S6K => pS6K; kc2_rt_019*S6K*amTORC1*(1 - w_drg*mtorc1i_on*mtorc1i/(Ki_drg + mtorc1i)) - vm_rt_019*pS6K;  // modifiers: amTORC1
  rt_020: S6 => pS6; S6*kc2_rt_020a*pS6K - vm_rt_020*pS6;  // modifiers: pS6K
  rt_021: dRas => tRas; dRas*(kc2_rt_021a*pHER3L + kc2_rt_021b*IRp/(1 + Ki_rt_004*pS6K*(1 - w_drg*s6ki_on*s6ki/(Ki_drg + s6ki))) + kc2_rt_021c*mGABp)/(1 + Ki_rt_021*pErk*(1 - w_drg*erki_on*erki/(Ki_drg + erki))) - vm_rt_021*tRas;  // modifiers: IRp, mGABp, pErk, pHER3L, pS6K
  rt_022: Raf => aaRaf; kc2_rt_022*tRas*Raf*(1 - w_drg*rasi_on*rasi/(Ki_drg + rasi))/(Km_rt_022 + Raf)/(1 + Ki_rt_022*pAkt*(1 - w_drg*akti_on*akti/(Ki_drg + akti))) - kc2_rt_022*aaRaf;  // modifiers: pAkt, tRas
  rt_023: Mek => pMek; kc2_rt_023*(1 + alpha_rt_023*tRac1*(1 - w_drg*rac1i_on*rac1i/(Ki_drg + rac1i)))*aaRaf*(1 - w_drg*rafi_on*rafi/(Ki_drg + rafi))*Mek/(Km_rt_023 + Mek) - vm_rt_023*pMek;  // modifiers: aaRaf, tRac1
  rt_024: Erk => pErk; kc2_rt_024*Erk*pMek*(1 - w_drg*meki_on*meki/(Ki_drg + meki)) - vm_rt_024*pErk;  // modifiers: pMek
  rt_025: => SGK3; vs_rt_025*(ER + pER)*(1 - w_drg*eri_on*eri/(Ki_drg + eri))/(Km_rt_025 + ER + pER);  // modifiers: ER, pER
  rt_026: SGK3 => ; kdeg_rt_026*SGK3;
  rt_027: => NDRG1; vs_rt_027;
  rt_028: NDRG1 => ; vs_rt_027/50*NDRG1;
  rt_029: NDRG1 => pNDRG1; kc2_rt_029*NDRG1*(pSGK1*(1 - w_drg*sgk1i_on*sgk1i/(Ki_drg + sgk1i)) + pSGK3*(1 - w_drg*sgk3i_on*sgk3i/(Ki_drg + sgk3i))) - vm_rt_029*pNDRG1;  // modifiers: pSGK1, pSGK3
  rt_030: pNDRG1 => ; kdeg_rt_030*pNDRG1*GSK3/(Km_rt_030 + pNDRG1);  // modifiers: GSK3
  rt_031: => HER3; vs_rt_031*FOXO3*(1 - w_drg*foxo3i_on*foxo3i/(Ki_drg + foxo3i))/(Km_rt_031 + FOXO3);  // modifiers: FOXO3
  rt_032: HER3 => ; deg_rt_031*HER3*(1 + alpha_rt_031*(NDRG1 + pNDRG1)*(1 - w_drg*ndrg1i_on*ndrg1i/(Ki_drg + ndrg1i)));  // modifiers: NDRG1, pNDRG1
  rt_033: HER3 + HRG => HER3L; ka_rt_033*HER3*HRG*HRG_on - kd_rt_033*HER3L;
  rt_034: HER3L => pHER3L; kc1_rt_034*HER3L*(1 - w_drg*her3i_on*her3i/(Ki_drg + her3i)) - vm_rt_034*pHER3L;
  rt_034_a: pHER3L => iHER3L; kc1_rt_034_a*pHER3L*(1 + alpha_rt_034_a*pErk*(1 - w_drg*erki_on*erki/(Ki_drg + erki))) - vm_rt_034_a*iHER3L;  // modifiers: pErk
  rt_035: => ER; vs_rt_035b*FOXO3*(1 - w_drg*foxo3i_on*foxo3i/(Ki_drg + foxo3i))/(Km_rt_035 + FOXO3);  // modifiers: FOXO3
  rt_036: ER => ; deg_rt_035*ER;
  rt_037: ER => pER; kc2_rt_037*pErk*ER*(1 - w_drg*erki_on*erki/(Ki_drg + erki)) - vm_rt_037*pER;  // modifiers: pErk
  cc_001: => RB; vs_cc_001;
  cc_002: RB => ; vs_cc_001/100*RB;
  cc_003: RB => pRB; kc1_cc_003*RB*(K4Da + K4Da_p21) - vm_cc_003*pRB;  // modifiers: K4Da, K4Da_p21
  cc_005: pRB => ppRB; kc2_cc_005*K2Ea*pRB - vm_cc_005*ppRB;  // modifiers: K2Ea
  cc_007: => E2F; tr_cc_007a*E2F*(1 - w_drg*e2fi_on*e2fi/(Ki_drg + e2fi))/(Km_cc_007b + E2F) + tr_cc_007b*(cMyc*(1 - w_drg*myci_on*myci/(Ki_drg + myci))/(Km_cc_007a + cMyc))*(E2F*(1 - w_drg*e2fi_on*e2fi/(Ki_drg + e2fi))/(Km_cc_007b + E2F)) + tr_cc_007c*(cMyc*(1 - w_drg*myci_on*myci/(Ki_drg + myci))/(Km_cc_007a + cMyc));  // modifiers: cMyc
  cc_008: E2F => ; E2F*(1 - w_drg*e2fi_on*e2fi/(Ki_drg + e2fi))*(kdeg_cc_008b + kdeg_cc_008a*K2Ea)/(Km_cc_008 + E2F);  // modifiers: K2Ea
  cc_009: RB + E2F => E2FRB; ka_cc_009*E2F*RB - kd_cc_009*E2FRB;
  cc_010: => Cd; vs_cc_010c*amTORC1*(1 - w_drg*mtorc1i_on*mtorc1i/(Ki_drg + mtorc1i))/(Km_cc_010b + amTORC1);  // modifiers: amTORC1
  cc_011: Cd => ; kdeg_cc_011*Cd*(1 + kc2_cc_011*GSK3*(1 - w_drg*gsk3i_on*gsk3i/(Ki_drg + gsk3i))/(Km_cc_011 + GSK3));  // modifiers: GSK3
  cc_012: Cd + CDK4 => K4D; ka_cc_012*Cd*CDK4*(1 - w_drg*cdi_on*cdi/(Ki_drg + cdi)) - kd_cc_012*K4D;
  cc_013: K4D => K4Da; kc1_cc_013*K4D - vm_cc_013b*K4Da;
  cc_013a: K4Da => CDK4; kc2_cc_013a*K4Da*GSK3*(1 - w_drg*gsk3i_on*gsk3i/(Ki_drg + gsk3i))/(Km_cc_011 + GSK3);  // modifiers: GSK3
  cc_014: K4Da + p21 => K4Da_p21; ka_cc_014*K4Da*p21*(1 - w_drg*p21i_on*p21i/(Ki_drg + p21i)) - kd_cc_014*K4Da_p21;
  cc_014a: K4Da_p21 => CDK4; kc2_cc_014a*K4Da_p21*GSK3*(1 - w_drg*gsk3i_on*gsk3i/(Ki_drg + gsk3i))/(Km_cc_011 + GSK3);  // modifiers: GSK3
  cc_015: => Ce; vs_cc_015*E2F*(1 - w_drg*e2fi_on*e2fi/(Ki_drg + e2fi))/(Km_cc_015 + E2F);  // modifiers: E2F
  cc_016: Ce => ; kdeg_cc_015*Ce;
  cc_017: Ce + CDK2 => K2E; ka_cc_017*Ce*CDK2*(1 - w_drg*cei_on*cei/(Ki_drg + cei)) - kd_cc_017*K2E;
  cc_018: K2E => K2Ea; kc1_cc_018a*K2E - vm_cc_018b*K2Ea;
  cc_019: K2Ea + p21 => K2Ea_p21; ka_cc_019*K2Ea*p21*(1 - w_drg*p21i_on*p21i/(Ki_drg + p21i)) - kd_cc_019*K2Ea_p21;
  cc_020: => p21; vs_cc_020*pErk*(1 - w_drg*erki_on*erki/(Ki_drg + erki))/(Km_cc_020 + pErk);  // modifiers: pErk
  cc_021: p21 => ; p21*(deg_cc_021 + kc2_cc_021b*K2Ea/(Km_cc_021b + K2Ea));  // modifiers: K2Ea
  cc_022: p21 => p_p21; kc2_cc_021a*pAkt*p21*(1 - w_drg*akti_on*akti/(Ki_drg + akti))/(Km_cc_021a + pAkt);  // modifiers: pAkt
  cc_023: p_p21 => ; p_p21*(deg_cc_021/10 + kc2_cc_021b*K2Ea/(Km_cc_021b + K2Ea));  // modifiers: K2Ea
  cc_025: => cMyc; vs_cc_025a*amTORC1*(1 - w_drg*mtorc1i_on*mtorc1i/(Ki_drg + mtorc1i))/(Km_cc_025a + amTORC1) + vs_cc_025b*(ER + pER)*(1 - w_drg*eri_on*eri/(Ki_drg + eri))/(Km_cc_025b + ER + pER);  // modifiers: ER, amTORC1, pER
  cc_026: cMyc => ; deg_cc_025*cMyc*(1 + kc1_cc_026*GSK3*(1 - w_drg*gsk3i_on*gsk3i/(Ki_drg + gsk3i)));  // modifiers: GSK3
end
